// COMSOL Multiphysics 5.4.0.225 model "Konsolbalk.mph"
// Outline of the model tree

Parameters
  L = 1[m]
  b = 0.1[m]
  height = 0.1[m]
  P = 1000[N]
  N = 6

Geometry
  geom1 "Geometry 1" (3D, length unit m)
    blk1: Block | size = {b, L, height}
    fin: Finalize "Form Union"

Materials
  mat1: Common "Material 1" on all domains
    def "Basic"
      youngsmodulus = 200e9
      poissonsratio = 0.3
      density = 1

Physics
  solid: SolidMechanics on all domains
    dependent variable u = {u, v, w}
    lemm1: LinearElasticModel "Linear Elastic Material 1" (default)
    free1: Free (default)
    init1: init "Initial Values 1" (default)
    fix1: Fixed "Fixed Constraint 1" on boundaries 5
    bndl1: BoundaryLoad on boundaries 2 | LoadType = TotalForce; Ftot = {0, 0, -P}

Mesh
  mesh1 "Mesh 1"
    size: MeshSizeDefault | hauto = 6
    map1: Map "Mapped 1" on boundaries 4
      dis1: Distribution on edges 4 | numelem = N*2
    swe1: Sweep "Swept 1" on remaining entities | sourceface = boundaries 4; targetface = boundaries 3
      dis1: Distribution on domains 1 | numelem = N

Studies
  std1 "Study 1"
    param: Parametric "Parametric Sweep" | pname = N; plistarr = range(1,1,3)
    stat: Stationary

Solver configurations
  sol1 "Solution 1" (study std1)
    v1: Variables "Dependent Variables 1"
    s1: Stationary "Stationary Solver 1"
      fc1: FullyCoupled | linsolver = d1
      d1: Direct "Suggested Direct Solver (solid)"
  sol2 "Parametric Solutions 1" (study std1)

Datasets
  dset1: Solution | solution = sol1
  dset2: Solution | solution = sol2

Derived values
  av1: AvLine "Line Average 1" on edges 3 | data = dset2; table = tbl1; expr = abs(w); unit = m

Tables
  tbl1: Table
    // Line Average 1 (w)
    N | abs(w) (m)
    1 | 0.000178832
    2 | 0.000194104
    3 | 0.000197024
    4 | 0.000198148
    5 | 0.000198724
    6 | 0.000199067
    7 | 0.000199289
    8 | 0.000199443
    9 | 0.000199554
    10 | 0.000199637
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
Plots
  pg1: PlotGroup3D "Stress (solid)" | data = dset2
    surf1: Surface | expr = solid.sy; descr = Stress tensor, y component
      def: Deform "Deformation" | expr = {u, v, w}; descr = Displacement field (Material)
  pg2: PlotGroup1D "1D Plot Group 2" | data = none
    tblp1: Table "Table Graph 1" | table = tbl1
  pg3: PlotGroup3D "Stress (solid) 1" | data = dset1
    surf1: Surface | expr = solid.mises
      def: Deform "Deformation" | expr = {u, v, w}; descr = Displacement field (Material)