// COMSOL Multiphysics 5.5.0.359 model "dragkrok.mph"
// Outline of the model tree

Parameters
  r = 1[dm]
  height = 2[dm]
  P = 5[kN]

Geometry
  geom1 "Geometry 1" (3D, length unit m)
    sph1: Sphere | r = r
    cyl1: Cylinder | r = (2/3)*r; h = height
    uni1: Union | input = cyl1, sph1; intbnd = off; face = all
    tor1: Torus | pos = {0, 0, height}; rmaj = 2*r; rmin = (2/3)*r; angle = 90
    rot1: Rotate | input = tor1; axistype = y; rot = -90
    mov1: Move | input = rot1; specify = pos; displx = 0; disply = 0; displz = 0; newposvertices = uni1(1) points 12
    uni2: Union | input = mov1, uni1; intbnd = off; face = all
    cyl2: Cylinder | pos = {0, -0.4, 0.3}; r = (2/3)*r; h = 0.2
    rot2: Rotate | input = cyl2; axistype = x; rot = 90
    mov2: Move | input = rot2; specify = pos; displx = 0; disply = 0; displz = 0; newposvertices = uni2(1) points 6
    uni3: Union | input = mov2, uni2; intbnd = off; face = all
    rot3: Rotate | input = uni3; axistype = x; rot = 180
    fin: Finalize "Form Union"

Materials
  mat1: Common "Structural steel" on all domains
    def "Basic"
      relpermeability = 1
      heatcapacity = 475[J/(kg*K)]
      thermalconductivity = 44.5[W/(m*K)]
      electricconductivity = 4.032e6[S/m]
      relpermittivity = 1
      thermalexpansioncoefficient = 12.3e-6[1/K]
      density = 7850[kg/m^3]
    Enu "Young's modulus and Poisson's ratio"
      youngsmodulus = 200e9[Pa]
      poissonsratio = 0.30
    Murnaghan
      l = -3.0e11[Pa]
      m = -6.2e11[Pa]
      n = -7.2e11[Pa]
    Lame "Lamé parameters"
      lambLame = 1.15e11[Pa]
      muLame = 7.69e10[Pa]

Physics
  solid: SolidMechanics on all domains
    dependent variable u = {u, v, w}
    lemm1: LinearElasticModel "Linear Elastic Material 1" (default)
    free1: Free (default)
    init1: init "Initial Values 1" (default)
    fix1: Fixed "Fixed Constraint 1" on boundaries 11
    bndl1: BoundaryLoad on boundaries 1-4, 12, 13, 16, 19
      LoadType = TotalForce
      Ftot = {0, -P, 0}
      FperArea = {0, -P, 0}

Mesh
  mesh1 "Mesh 1" (physics-controlled)
    size: MeshSizeDefault | hauto = 3

Studies
  std1 "Study 1"
    stat: Stationary

Solver configurations
  sol1 "Solution 1" (study std1)
    v1: Variables "Dependent Variables 1"
    s1: Stationary "Stationary Solver 1"
      fc1: FullyCoupled | linsolver = d1
      d1: Direct "Suggested Direct Solver (solid)"

Datasets
  dset1: Solution | solution = sol1

Derived values
  max1: MaxVolume "Volume Maximum 1" on domains 1 | data = dset1; table = tbl4; expr = solid.mises; unit = MPa

Tables
  tbl1: Table
    // Volume Maximum 1
    von Mises stress (MPa)
    45.0143
  tbl4: Table
    // Volume Maximum 1
    von Mises stress (MPa)
    12.504

Plots
  pg1: PlotGroup3D "Stress (solid)" | data = dset1
    surf1: Surface | expr = solid.mises; unit = MPa
      def: Deform "Deformation" | expr = {u, v, w}; descr = Displacement field
  pg2: PlotGroup3D "Boundary Loads (solid)" | data = dset1; typeintitle = off; descriptionintitle = off; unitintitle = off
    arws1: ArrowSurface "Boundary Load 1" | expr = {solid.bndl1.F_Ax, solid.bndl1.F_Ay, solid.bndl1.F_Az}
      col: Color "Color Expression" | expr = comp1.solid.bndl1.F_A_Mag
      def: Deform "Deformation" | expr = {u, v, w}; descr = Displacement field
    surf1: Surface "Gray Surfaces" (disabled) | expr = 1
      def: Deform "Deformation" | expr = {u, v, w}; descr = Displacement field